<?xml version="1.0" ?>
<Lems xmlns="http://www.neuroml.org/lems/0.7.3" xmlns:xsi="http://www.w3.org/2001/XMLSchema-instance" xsi:schemaLocation="http://www.neuroml.org/lems/0.7.3 https://raw.githubusercontent.com/LEMS/LEMS/development/Schemas/LEMS/LEMS_v0.7.3.xsd">
  <Component averageRate="80 Hz" id="mossySpikerOFF" minimumISI="2 ms" type="spikeGeneratorRefPoisson"/>
  <Component averageRate="80 Hz" id="mossySpikerON" minimumISI="2 ms" type="spikeGeneratorRefPoisson"/>
</Lems>
